[1, 7, 4; 0, 9, 4; 8, 8, 2] + [4, 5, 5; 1, 7, 1; 1, 5, 2] = [5, 12, 9; 1, 16, 5; 9, 13, 4]
[1, 7, 4; 0, 9, 4; 8, 8, 2]*[4, 5, 5; 1, 7, 1; 1, 5, 2] = [15, 74, 20; 13, 83, 17; 42, 106, 52]
[1, 7, 4; 0, 9, 4; 8, 8, 2]*[7; 6; 1] = [53; 58; 106]
transpose([7; 6; 1])*[4; 2; 3] = 43
transpose([7; 6; 1])*[1, 7, 4; 0, 9, 4; 8, 8, 2]*[4; 2; 3] = 444
[7; 6; 1]×[4; 2; 3] = [16; -17; -10]
[7; 6; 1]*[4; 2; 3] = 43
||[7; 6; 1]|| = 9.27362
